// SBML level 2 version 3

model ChenXF2008_CICR()
  // The model reproduces the plots in Figures 1 and 2. Note that the units of the time scale "A" are not right in the paper, it was corrected by the curator. Model successfully tested on MathSBML.
  // biomodels.db:MODEL7519277765
  // biomodels.db:BIOMD0000000202
  // isDescribedBy pubmed:18538916
  // isDerivedFrom pubmed:1329108
  // isVersionOf GO:0051209 GO:0032237 GO:0051928
  // occursIn taxonomy:131567

  // Compartments:
  compartment Cytoplasm = 1;
  compartment ER = 0.185;
  compartment PM = 1;

  // Species:
  species Ca_Cyt in Cytoplasm = 0;  // CHEBI:29108 kegg.compound:C00076
  species IP3_Cyt in Cytoplasm = 0;  // CHEBI:16595 kegg.compound:C01245
  species Ca_ER in ER = 0;  // CHEBI:29108 kegg.compound:C00076
  species S2 in ER;  // isVersionOf uniprot:Q13586
  species S2a in ER = 0.06;  // isVersionOf uniprot:Q13586
  species S4 in ER = 0;  // isVersionOf uniprot:Q13586
  species Oc in PM = 0;
  species O_o in PM = 0;
  species Orai1 in PM;  // isVersionOf uniprot:Q96D31

  // Parameters:
  L = 0.00093 s_1;
  P_IP3R = 66.6 s_1;
  Ki = 1 uM;
  k_i = 6 s_1;
  Ka = 0.4 uM;
  V_SERCA = 1 uM_s_1;
  p = 2 dimensionless;
  K_SERCA = 0.15 uM;
  k_soc = 2.3 uM_1_s_1;
  V_PMleak = 5e-7 s_1;
  Ca_ec = 1500 uM;
  V_PMCA = 1 uM_s_1;
  q = 2 dimensionless;
  K_PMCA = 0.45 uM;
  V_PLC = 0.5 uM_s_1;
  K_PLC = 0.12 uM;
  kdeg = 0.5 s_1;
  K_deg = 0.1 uM;
  A = 0.5 uM_1_s_1;
  Kd = 0.4 uM;
  K1 = 5 uM;
  St = 0.6 uM;
  k_a = 4 s_1;
  Vs4 = 0.25 uM_s_1;
  K2 = 0.14 uM;
  kd_oligo = 0.8 s_1;
  Vcp = 0.00018 uM_s_1;
  n_hill = 3 dimensionless;
  Kc = 2e-5 uM;
  kdc = 0.5 s_1;
  kop = 0.5 s_1;
  l_hill = 1 dimensionless;
  Ko = 0.2 uM;
  kod = 1 s_1;
  kdo = 0.6 s_1;
  r_hill = 4 dimensionless;
  h = 0 dimensionless;
  Orai1_t = 0.001 uM;

  // Assignment rules:
  Orai1 := Orai1_t - (r_hill*Oc + r_hill*O_o);
  S2 := K1^2/(Ca_ER^2 + K1^2)*(St - S2a);

  // Rate rules:
  h' = A*(Kd - (Ca_Cyt + Kd)*h);

  // Reactions:
  ER_Channel: Ca_ER => Ca_Cyt; Cytoplasm*(L + P_IP3R*IP3_Cyt^3*Ca_Cyt^3*h^3/((IP3_Cyt + Ki)^3*(Ca_Cyt + Ka)^3))*(Ca_ER - Ca_Cyt);  // modifiers: IP3_Cyt; isVersionOf GO:0048763
  SERCA: Ca_Cyt => Ca_ER; Cytoplasm*(V_SERCA*Ca_Cyt^p/(K_SERCA^p + Ca_Cyt^p));  // isVersionOf GO:0005388
  PM_Channel: => Ca_Cyt; Cytoplasm*(k_soc*O_o + V_PMleak)*(Ca_ec - Ca_Cyt);  // modifiers: O_o; isVersionOf GO:0051928
  PMCA: Ca_Cyt => ; Cytoplasm*(V_PMCA*Ca_Cyt^q/(K_PMCA^q + Ca_Cyt^q));  // isVersionOf GO:0005388
  PLC: => IP3_Cyt; Cytoplasm*(V_PLC*Ca_Cyt^2/(K_PLC^2 + Ca_Cyt^2));  // modifiers: Ca_Cyt; isVersionOf GO:0050429
  deg: IP3_Cyt => ; Cytoplasm*(kdeg*Ca_Cyt^2/(K_deg^2 + Ca_Cyt^2))*IP3_Cyt;  // modifiers: Ca_Cyt
  act_apoSTIM1_syn: => S2a; ER*k_a*S2;  // modifiers: S2; isVersionOf GO:0032237
  act_apoSTIM1_deg: S2a => ; ER*k_i*S2a;
  apoSTIM1_oligo_syn: => S4; ER*(Vs4*S2^2/(S2^2 + K2^2));  // modifiers: S2
  apoSTIM1_oligo_deg: S4 => ; ER*kd_oligo*S4;
  close_CRAC_prod: => Oc; PM*(Vcp*Orai1^n_hill/(Kc^n_hill + Orai1^n_hill));  // modifiers: Orai1
  closed_CRAC_channel_deg: Oc => ; PM*kdc*Oc;
  open_CRAC_channel_prod: Oc => O_o; PM*(kop*S2a^l_hill*Oc/(Ko^l_hill + S2a^l_hill));  // modifiers: S2a
  open_to_closed: O_o => Oc; PM*kod*O_o;
  open_CRAC_channel_deg: O_o => ; PM*kdo*O_o;

  // Unit definitions:
  unit substance = 1e-6 mole; substance is "micromole";
  unit uM = 1e-6 mole / litre;
  unit s_1 = 1 / second;
  unit uM_s_1 = 1e-6 mole / (litre * second);
  unit uM_1_s_1 = litre / (1e-6 mole * second);
end
